// SBML level 3 version 1

model main()
  // model units - substance: mole, time: second, extent: mole

  // Compartments:
  compartment c1 = 1 litre;
  compartment comp = 1 litre;

  // Species:
  species not_q1 in comp = 0;
  species q1 in comp = 0;
  species i1 in comp = 0;
  species not_a1 in comp = 0;
  species i2 in comp = 0;
  species a1 in comp = 0;
  species clk in comp = 0;

  // Parameters:
  delta_I = 0 per_second;
  delta2 = 0 per_second;
  alpha4 = 0 per_second;
  n_I = 0 per_second;
  alpha_I = 0 per_second;
  n = 0 per_second;
  alpha1 = 0 per_second;
  Kd = 0 per_second;
  alpha3 = 0 per_second;
  delta1 = 0 per_second;
  Kd_I = 0 per_second;
  alpha2 = 0 per_second;

  // Reactions:
  r0: not_q1 + clk => not_q1 + a1 + clk; alpha1*((not_q1/Kd)^n/(1 + (not_q1/Kd)^n + (clk/Kd)^n + (not_q1/Kd)^n*(clk/Kd)^n));
  r1: not_a1 => not_a1 + a1; alpha2*(1/(1 + (not_a1/Kd)^n));
  r2: a1 => ; delta1*a1;
  r3: not_q1 + clk => not_a1 + not_q1 + clk; alpha1*(1/(1 + (not_q1/Kd)^n + (clk/Kd)^n + (not_q1/Kd)^n*(clk/Kd)^n));
  r4: a1 => not_a1 + a1; alpha2*(1/(1 + (a1/Kd)^n));
  r5: not_a1 => ; delta1*not_a1;
  r6: a1 + clk => clk + a1 + q1; alpha3*((a1/Kd)^n*(clk/Kd)^n/(1 + (a1/Kd)^n + (clk/Kd)^n + (a1/Kd)^n*(clk/Kd)^n));
  r7: not_q1 => not_q1 + q1; alpha4*(1/(1 + (not_q1/Kd)^n));
  r8: q1 => ; delta2*q1;
  r9: not_a1 + clk => not_a1 + not_q1 + clk; alpha3*((not_a1/Kd)^n*(clk/Kd)^n/(1 + (not_a1/Kd)^n + (clk/Kd)^n + (not_a1/Kd)^n*(clk/Kd)^n));
  r10: q1 => not_q1 + q1; alpha4*(1/(1 + (q1/Kd)^n));
  r11: not_q1 => ; delta2*not_q1;
  r12: not_q1 => i1 + not_q1; alpha_I*(not_q1/Kd_I)^n_I/(1 + (not_q1/Kd_I)^n_I);
  r13: i1 => ; delta_I*i1;
  r14: q1 => i2 + q1; alpha_I*(q1/Kd_I)^n_I/(1 + (q1/Kd_I)^n_I);
  r15: i2 => ; delta_I*i2;

  // Unit definitions:
  unit per_second = 1 / second;
end
