// SBML level 3 version 1

model main()
  // model units - substance: mole, time: second, extent: mole

  // Compartments:
  compartment c1 = 1 litre;
  compartment comp = 1 litre;

  // Species:
  species i2 in comp = 0;
  species not_q3 in comp = 0;
  species i5 in comp = 0;
  species clk in comp = 0;
  species a2 in comp = 0;
  species i4 in comp = 0;
  species a3 in comp = 0;
  species q3 in comp = 0;
  species i3 in comp = 0;
  species not_a3 in comp = 0;
  species not_q2 in comp = 0;
  species not_a1 in comp = 0;
  species not_a2 in comp = 0;
  species i6 in comp = 0;
  species not_q1 in comp = 0;
  species q1 in comp = 0;
  species q2 in comp = 0;
  species i1 in comp = 0;
  species a1 in comp = 0;

  // Parameters:
  delta2 = 0 per_second;
  Kd = 0 per_second;
  alpha2 = 0 per_second;
  alpha4 = 0 per_second;
  alpha_I = 0 per_second;
  alpha3 = 0 per_second;
  delta_I = 0 per_second;
  Kd_I = 0 per_second;
  n_I = 0 per_second;
  delta1 = 0 per_second;
  alpha1 = 0 per_second;
  n = 0 per_second;

  // Reactions:
  r0: clk + not_q3 => clk + not_q3 + a1; alpha1*((not_q3/Kd)^n/(1 + (not_q3/Kd)^n + (clk/Kd)^n + (not_q3/Kd)^n*(clk/Kd)^n));
  r1: not_a1 => not_a1 + a1; alpha2*(1/(1 + (not_a1/Kd)^n));
  r2: a1 => ; delta1*a1;
  r3: clk + not_q3 => clk + not_q3 + not_a1; alpha1*(1/(1 + (not_q3/Kd)^n + (clk/Kd)^n + (not_q3/Kd)^n*(clk/Kd)^n));
  r4: a1 => not_a1 + a1; alpha2*(1/(1 + (a1/Kd)^n));
  r5: not_a1 => ; delta1*not_a1;
  r6: clk + a1 => clk + a1 + q1; alpha3*((a1/Kd)^n*(clk/Kd)^n/(1 + (a1/Kd)^n + (clk/Kd)^n + (a1/Kd)^n*(clk/Kd)^n));
  r7: not_q1 => not_q1 + q1; alpha4*(1/(1 + (not_q1/Kd)^n));
  r8: q1 => ; delta2*q1;
  r9: clk + not_a1 => not_q1 + clk + not_a1; alpha3*((not_a1/Kd)^n*(clk/Kd)^n/(1 + (not_a1/Kd)^n + (clk/Kd)^n + (not_a1/Kd)^n*(clk/Kd)^n));
  r10: q1 => not_q1 + q1; alpha4*(1/(1 + (q1/Kd)^n));
  r11: not_q1 => ; delta2*not_q1;
  r12: clk + q1 => clk + a2 + q1; alpha1*((q1/Kd)^n/(1 + (q1/Kd)^n + (clk/Kd)^n + (q1/Kd)^n*(clk/Kd)^n));
  r13: not_a2 => not_a2 + a2; alpha2*(1/(1 + (not_a2/Kd)^n));
  r14: a2 => ; delta1*a2;
  r15: clk + q1 => clk + not_a2 + q1; alpha1*(1/(1 + (q1/Kd)^n + (clk/Kd)^n + (q1/Kd)^n*(clk/Kd)^n));
  r16: a2 => a2 + not_a2; alpha2*(1/(1 + (a2/Kd)^n));
  r17: not_a2 => ; delta1*not_a2;
  r18: clk + a2 => q2 + a2 + clk; alpha3*((a2/Kd)^n*(clk/Kd)^n/(1 + (a2/Kd)^n + (clk/Kd)^n + (a2/Kd)^n*(clk/Kd)^n));
  r19: not_q2 => q2 + not_q2; alpha4*(1/(1 + (not_q2/Kd)^n));
  r20: q2 => ; delta2*q2;
  r21: clk + not_a2 => clk + not_q2 + not_a2; alpha3*((not_a2/Kd)^n*(clk/Kd)^n/(1 + (not_a2/Kd)^n + (clk/Kd)^n + (not_a2/Kd)^n*(clk/Kd)^n));
  r22: q2 => q2 + not_q2; alpha4*(1/(1 + (q2/Kd)^n));
  r23: not_q2 => ; delta2*not_q2;
  r24: q2 + clk => q2 + a3 + clk; alpha1*((q2/Kd)^n/(1 + (q2/Kd)^n + (clk/Kd)^n + (q2/Kd)^n*(clk/Kd)^n));
  r25: not_a3 => a3 + not_a3; alpha2*(1/(1 + (not_a3/Kd)^n));
  r26: a3 => ; delta1*a3;
  r27: q2 + clk => q2 + not_a3 + clk; alpha1*(1/(1 + (q2/Kd)^n + (clk/Kd)^n + (q2/Kd)^n*(clk/Kd)^n));
  r28: a3 => a3 + not_a3; alpha2*(1/(1 + (a3/Kd)^n));
  r29: not_a3 => ; delta1*not_a3;
  r30: clk + a3 => clk + q3 + a3; alpha3*((a3/Kd)^n*(clk/Kd)^n/(1 + (a3/Kd)^n + (clk/Kd)^n + (a3/Kd)^n*(clk/Kd)^n));
  r31: not_q3 => not_q3 + q3; alpha4*(1/(1 + (not_q3/Kd)^n));
  r32: q3 => ; delta2*q3;
  r33: clk + not_a3 => clk + not_q3 + not_a3; alpha3*((not_a3/Kd)^n*(clk/Kd)^n/(1 + (not_a3/Kd)^n + (clk/Kd)^n + (not_a3/Kd)^n*(clk/Kd)^n));
  r34: q3 => not_q3 + q3; alpha4*(1/(1 + (q3/Kd)^n));
  r35: not_q3 => ; delta2*not_q3;
  r36: not_q1 + not_q3 => not_q3 + not_q1 + i1; alpha_I*(not_q1/Kd_I)^n_I*(not_q3/Kd_I)^n_I/(1 + (not_q1/Kd_I)^n_I + (not_q3/Kd_I)^n_I + (not_q1/Kd_I)^n_I*(not_q3/Kd_I)^n_I);
  r37: i1 => ; delta_I*i1;
  r38: not_q2 + q1 => i2 + not_q2 + q1; alpha_I*(q1/Kd_I)^n_I*(not_q2/Kd_I)^n_I/(1 + (q1/Kd_I)^n_I + (not_q2/Kd_I)^n_I + (q1/Kd_I)^n_I*(not_q2/Kd_I)^n_I);
  r39: i2 => ; delta_I*i2;
  r40: q2 + not_q3 => q2 + not_q3 + i3; alpha_I*(q2/Kd_I)^n_I*(not_q3/Kd_I)^n_I/(1 + (q2/Kd_I)^n_I + (not_q3/Kd_I)^n_I + (q2/Kd_I)^n_I*(not_q3/Kd_I)^n_I);
  r41: i3 => ; delta_I*i3;
  r42: q3 + q1 => q3 + i4 + q1; alpha_I*(q1/Kd_I)^n_I*(q3/Kd_I)^n_I/(1 + (q1/Kd_I)^n_I + (q3/Kd_I)^n_I + (q1/Kd_I)^n_I*(q3/Kd_I)^n_I);
  r43: i4 => ; delta_I*i4;
  r44: not_q1 + q2 => not_q1 + q2 + i5; alpha_I*(not_q1/Kd_I)^n_I*(q2/Kd_I)^n_I/(1 + (not_q1/Kd_I)^n_I + (q2/Kd_I)^n_I + (not_q1/Kd_I)^n_I*(q2/Kd_I)^n_I);
  r45: i5 => ; delta_I*i5;
  r46: not_q2 + q3 => q3 + not_q2 + i6; alpha_I*(not_q2/Kd_I)^n_I*(q3/Kd_I)^n_I/(1 + (not_q2/Kd_I)^n_I + (q3/Kd_I)^n_I + (not_q2/Kd_I)^n_I*(q3/Kd_I)^n_I);
  r47: i6 => ; delta_I*i6;

  // Unit definitions:
  unit per_second = 1 / second;
end
